// COMSOL Multiphysics 6.0.0.318 model "A7Q1.mph"
// Outline of the model tree

Geometry
  geom1 "Geometry 1" (2D axisymmetric, length unit m)
    r1: Rectangle | pos = {0.02, 0}; size = {0.08, 0.14}
    pt1: Point | p = {0.02, 0.04}
    pt2: Point | p = {0.02, 0.1}
    fin: Finalize "Form Union"

Physics
  ht: HeatTransfer "Heat Transfer in Solids" on domains 1
    dependent variable T
    solid1: SolidHeatTransferModel "Solid 1" (default)
      k_mat = userdef
      k = 52
      rho_mat = userdef
      rho = 7850
      Cp_mat = userdef
      Cp = 460
    init1: init "Initial Values 1" (default)
    axi1: AxialSymmetry (default)
    ins1: ThermalInsulation (default)
    hs1: HeatSource on domains 1
    temp1: TemperatureBoundary "Temperature 1" on boundaries 2, 5, 6 | T0 = 273.15[K]
    hf1: HeatFluxBoundary "Heat Flux 1" on boundaries 3 | q0_input = 5e5

Mesh
  mesh1 "Mesh 1" (physics-controlled)

Studies
  std1 "Study 1"
    stat: Stationary (disabled)
  std2 "Study 2"
    time: Transient "Time Dependent" | tlist = range(0,5,60)

Solver configurations
  sol1 "Solution 1" (study std1)
  sol2 "Solution 2" (study std2)
    v1: Variables "Dependent Variables 1"
    t1: Time "Time-Dependent Solver 1"
      tlist = range(0,5,60)
      atolmethod = {comp1_T, global}
      atolvaluemethod = {comp1_T, factor}
      atol = {comp1_T, 1e-3}
      maxorder = 2
      estrat = exclude
      fc1: FullyCoupled
        linsolver = d1
        damp = 0.9
        jtech = once
        stabacc = aacc
        aaccdim = 5
        aaccmix = 0.9
        aaccdelay = 1
      d1: Direct "Direct, heat transfer variables (ht)" | linsolver = pardiso; pivotperturb = 1.0E-13

Datasets
  dset1: Solution | solution = sol1
  rev1: Revolve2D "Revolution 2D" | data = dset1; startangle = -90; revangle = 225
  cpt1: CutPoint2D "A(0.04,0.04)" | data = dset1; pointx = 0.04; pointy = 0.04
  cpt2: CutPoint2D "B(0.06,0.07)" | data = dset1; pointx = 0.06; pointy = 0.07
  cpt3: CutPoint2D "C(0.06,0.1)" | data = dset1; pointx = 0.06; pointy = 0.1
  cln1: CutLine2D "r=0.03" | data = dset1; genpoints = {{0.03, 0}, {0.03, 0.14}}
  cln2: CutLine2D "r=0.05" | data = dset1; genpoints = {{0.05, 0}, {0.05, 0.14}}
  cln3: CutLine2D "r=0.07" | data = dset1; genpoints = {{0.07, 0}, {0.07, 0.14}}
  cln4: CutLine2D "a=0.05" | data = dset1; genpoints = {{0.02, 0.05}, {0.1, 0.05}}
  cln5: CutLine2D "a=0.08" | data = dset1; genpoints = {{0.02, 0.08}, {0.1, 0.08}}
  cln6: CutLine2D "a=0.1" | data = dset1; genpoints = {{0.02, 0.1}, {0.1, 0.1}}
  cln7: CutLine2D "r=0.02" | data = dset1; genpoints = {{0.02, 0}, {0.02, 0.14}}
  dset2: Solution | solution = sol2
  rev2: Revolve2D "Revolution 2D 1" | data = dset2; startangle = -90; revangle = 225

Derived values
  pev1: EvalPoint "A(0.04,0.04)" | data = cpt1; table = tbl1; expr = T
  pev2: EvalPoint "B(0.06,0.07)" | data = cpt2; table = tbl1; expr = T
  pev3: EvalPoint "C(0.06,0.1)" | data = cpt3; table = tbl1; expr = T

Tables
  tbl1: Table
    // A(0.04,0.04)
    Temperature (K), Point: (0.04, 0.04) | Temperature (K), Point: (0.06, 0.07) | Temperature (K), Point: (0.06, 0.1)
    332.956 | 313.097 | 302.398

Plots
  pg1: PlotGroup3D "Temperature, 3D (ht)" | data = rev1
    surf1: Surface | expr = T
  pg2: PlotGroup2D "Isothermal Contours (ht)" | data = dset1; dataisaxisym = on
    con1: Contour | expr = T; levelrounding = off
  pg3: PlotGroup1D "temp profile(radial)" | data = dset1
    lngr1: LineGraph | data = cln1; expr = T; legends = R=0.03
    lngr2: LineGraph | data = cln2; expr = T; legends = R=0.05
    lngr3: LineGraph | data = cln3; expr = T; legends = R=0.07
    lngr4: LineGraph | data = cln7; expr = T; legends = R=0.02
  pg4: PlotGroup1D "temp profile(axial)" | data = dset1
    lngr1: LineGraph | data = cln4; expr = T; legends = {A=0.05, A=0.08, A=0.1}
    lngr2: LineGraph | data = cln5; expr = T; legends = A=0.08
    lngr3: LineGraph | data = cln6; expr = T; legends = A=0.08
  pg5: PlotGroup3D "Temperature, 3D (ht) 1" | data = rev2
    surf1: Surface | expr = T
  pg6: PlotGroup2D "Isothermal Contours (ht) 1" | data = dset2; dataisaxisym = on
    con1: Contour | expr = T; levelrounding = off