// COMSOL Multiphysics 6.0.0.318 model "A7q4_nahin.mph"
// Outline of the model tree

Parameters
  Re = 1e3

Geometry
  geom1 "Geometry 1" (2D, length unit m)
    ls1: LineSegment | specify1 = coord; specify2 = coord; coord2 = {0, 1}
    ls2: LineSegment | specify1 = coord; specify2 = coord; coord2 = {1, 0}
    rot1: Rotate | input = ls1; rot = 330
    ls3: LineSegment | vertex1 = rot1(1) points 2; vertex2 = ls2(1) points 2; coord2 = {1, 0}
    csol1: ConvertToSolid | input = ls2, ls3, rot1
    fin: Finalize "Form Union"

Physics
  spf: LaminarFlow on all domains
    dependent variable u = {u, v, w}
    fp1: FluidProperties (default)
      rho_mat = userdef
      rho = 1
      Constitutiverelation = Newtonian
      mu_mat = userdef
      mu = 1/Re
    init1: init "Initial Values 1" (default) | u_init = {1, 1, 0}
    wallbc1: WallBC "Wall 1" (default) | BoundaryCondition = NoSlip
    prpc1: PressurePointConstraint on points 1
  poeq: PoissonEquation "Poisson's Equation" (disabled) on all domains
    dependent variable u2
    peq1: PoissonEquation "Poisson's Equation 1" (default) | f = vx-uy
    zflx1: ZeroFluxBoundary "Zero Flux 1" (default)
    init1: init "Initial Values 1" (default)
    dir1: DirichletBoundary "Dirichlet Boundary Condition 1" on boundaries 1-3 | r = 0

Mesh
  mesh1 "Mesh 1" (physics-controlled)
    size: MeshSizeDefault | table = cfd; hauto = 6

Studies
  std1 "Study 1"
    param: Parametric "Parametric Sweep" | sweeptype = filled; pname = Re; plistarr = 1e4 1e5 1e7
    stat: Stationary

Solver configurations
  sol1 "Solution 1" (study std1)
    v1: Variables "Dependent Variables 1"
    s1: Stationary "Stationary Solver 1"
      p1: Parametric | sweeptype = filled; pname = Re; plistarr = 1e4 1e5 1e7; pcontinuationmode = no
      fc1: FullyCoupled | linsolver = d1; initstep = 0.01; maxiter = 200
      d1: Direct "Direct, fluid flow variables (spf)" | linsolver = pardiso; pivotperturb = 1.0E-13

Datasets
  dset1: Solution | solution = sol1

Plots
  pg1: PlotGroup2D "Velocity (spf)" | data = dset1
    surf1: Surface | expr = spf.U
  pg2: PlotGroup2D "Pressure (spf)" | data = dset1
    con1: Contour | data = dset1; expr = p; levelrounding = off
  pg3: PlotGroup2D "2D Plot Group 3" | data = dset1
    con1: Contour (disabled) | data = dset1; expr = u2